OpenVSP model (file version 5), 4 components.
Geometry view with OpenVSP parameter names; values to 6 digits, angles in degrees, lengths in the model's unit.
Overall bounding box: X_Min=-25.6667 X_Len=52.7222 Y_Min=-25.6667 Y_Len=57.8177 Z_Min=-30 Z_Len=73.5

Fuselage "FuselageGeom"
  location (X Y Z) 0 0 6, rotation 0 0 0
  bounding box size 27.0555 51.3333 62.675
  Design: Length=11.75
  cross sections:
    n  XLocPercent  YLocPercent  YRotate  ZLocPercent  shape
    0  0            0            0        0            general fuselage BotStr=1.66 BotTanAngle=90 CornerRad=0 Height=60 LowStr=0.83 MaxWidthLoc=-0.75 TopStr=0.6225 TopTanAngle=90 UpStr=0.83 Width=50
    1  1            0            -15      0            general fuselage BotStr=1.66 BotTanAngle=90 CornerRad=0 Height=60 LowStr=0.83 MaxWidthLoc=-0.75 TopStr=0.6225 TopTanAngle=90 UpStr=0.83 Width=40

Custom "Box"
  location (X Y Z) 0 0 0, rotation 0 0 0
  bounding box size 23.5 50 60
  Design: Height=60 Length=23.5 SquareFlag=0 Width=50
  custom script Box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

Custom "Disk"
  location (X Y Z) 0 0 0, rotation 0 0 0
  bounding box size 0 24 24
  Design: Diameter=24
  custom script Disk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

Stack "StackGeom"
  location (X Y Z) 0 0 6, rotation 0 0 90
  bounding box size 51.3333 35.151 62.8337
  cross sections:
    n  XDelta  YDelta  YRotate  ZDelta  shape
    0  0       0       0        0       general fuselage BotStr=1.66 BotTanAngle=90 CornerRad=0 Height=40 LowStr=0.415 MaxWidthLoc=-0.75 TopStr=0.415 TopTanAngle=90 UpStr=0.83 Width=30
    1  -3      0       0        6       general fuselage BotStr=0.66 BotTanAngle=90 CornerRad=0 Height=50 LowStr=0.415 MaxWidthLoc=-0.75 TopStr=0.415 TopTanAngle=90 UpStr=0.83 Width=40
    2  0       0       0        1.5     general fuselage BotStr=1.66 BotTanAngle=90 CornerRad=0 Height=60 LowStr=0.83 MaxWidthLoc=-0.75 TopStr=0.6225 TopTanAngle=90 UpStr=0.83 Width=50
    3  17.75   0       -15      -1.25   general fuselage BotStr=1.66 BotTanAngle=90 CornerRad=0 Height=60 LowStr=0.83 MaxWidthLoc=-0.75 TopStr=0.6225 TopTanAngle=90 UpStr=0.83 Width=40
